n_n := 1.70
n_v := 1.86
lab := 1.06*10^-6
v := 3.2
hf := 2.6
af := 3.5
ell := 10
len := 12
# Планарный волновод
# Толщина волновода | Для обоих случаев
1.1
h := (v*lab)/(2*π*sqrt(n_v^2 - n_n^2)) explicit, ALL → 3.2*1.06*10^-6/(2*π*sqrt(1.86^2 - 1.70^2)) = 7.15305e-7
# В данном СТОЛБЦЕ всякие штуки для расчетов в маткаде, которые не надо писать никуда
# <<==Списывать отсюда т.е. с первого столбца
h = 7.15305e-7
1.2
# Симметричный волновод
R := 2*π
Vgr2(U) := tan(U - 2*π)
Vgr1(U) := U*tan(U - π)
Vgr(U) := U*tan(U)
Vkr := 2*π
Vokr(U) := sqrt(R^2 - U^2)
f(x) := Vgr(x) - Vokr(x)
x1 := 1.5
x2 := 4
u0 := root(f(x1), x1)
u1 := root(f(x2), x2)
u0 = 1.35365
u1 = 4.01847
v0 := Vokr(u0)
v1 := Vokr(u1)
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v0 = 6.13564
v1 = 4.83015
u0 = 1.35365
u1 = 4.01847
k2 := 2*π/lab*n_n explicit, ALL → 2*π/(1.06*10^-6)*1.70
k1 := 2*π/lab*n_v explicit, ALL → 2*π/(1.06*10^-6)*1.86
k1 = 11025212
k2 = 10076807
Bte0 := sqrt(((v0/u0*k1)^2 + k2^2)/((v0/u0)^2 + 1))
Bte1 := sqrt(((v1/u1*k1)^2 + k2^2)/((v1/u1)^2 + 1))
Bte0 = 10983005
Bte1 = 10647496
k := 2*π/lab
N0 := Bte0/k
N1 := Bte1/k
N0 = 1.85288
N1 = 1.79628
# Проверка увр
n_n = 1.7
N0 = 1.85288
n_v = 1.86
n_n = 1.7
N1 = 1.79628
n_v = 1.86
n_n*k = 10076807
Bte0 = 10983005
n_v*k = 11025212
n_n*k = 10076807
Bte1 = 10647496
n_v*k = 11025212
# Асимметричный в-вд
W1(U) := -U*cot(U)
R := 5*π/2
W2(U) := sqrt(R^2 - U^2)
f(x) := W1(x) - W2(x)
x1 := 2.5
x2 := 5
u0 := root(f(x1), x1)
u1 := root(f(x2), x2)
u0 = 2.77982
u1 = 5.50627
w0 := W2(u0)
w1 := W2(u1)
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w0 = 7.34559
w1 = 5.60053
u0 = 2.77982
u0 = 2.77982
k2 := 2*π/lab*n_n explicit, ALL → 2*π/(1.06*10^-6)*1.70
k1 := 2*π/lab*n_v explicit, ALL → 2*π/(1.06*10^-6)*1.86
k1 = 11025212
k2 = 10076807
Bte0 := sqrt(((w0/u0*k1)^2 + k2^2)/((w0/u0)^2 + 1))
Bte1 := sqrt(((w1/u1*k1)^2 + k2^2)/((w1/u1)^2 + 1))
Bte0 = 10910921
Bte1 = 10569697
k := 2*π/lab
N0 := Bte0/k
N1 := Bte1/k
N0 = 1.84072
N1 = 1.78315
# Проверка увр
n_n = 1.7
N0 = 1.84072
n_v = 1.86
n_n = 1.7
N1 = 1.78315
n_v = 1.86
n_n*k = 10076807
Bte0 = 10910921
n_v*k = 11025212
n_n*k = 10076807
Bte1 = 10569697
n_v*k = 11025212
# 2 Гребенчатый волновод
n_o := 1
f1 := h
n_n = 1.7
n_v = 1.86
h1 := hf*f1 explicit, ALL → 2.6*7.15304545625e-7
h1 = 1.85979e-6
a1 := af*f1 explicit, ALL → 3.5*7.15304545625e-7
a1 = 2.50357e-6
УВР
n_n = 1.7  # Nm
n_v = 1.86
Vh := k*h1*sqrt(n_v^2 - n_n^2) explicit, ALL → 2*π/(1.06*10^-6)*2.6*7.15304545625e-7*sqrt(1.86^2 - 1.70^2)
Vh = 8.32
z := 0 .. 5
Vf := k*f1*sqrt(n_v^2 - n_n^2) explicit, ALL → 2*π/(1.06*10^-6)*7.15304545625e-7*sqrt(1.86^2 - 1.70^2)
Vf = 3.2
r := 0
Vple0(z) := (0*π + atan(sqrt(z/(1 - z))) + atan(sqrt((z + a1)/(1 - z))))/sqrt(1 - z)
# Степень асимметрии
a := (n_n^2 - n_o^2)/(n_v^2 - n_n^2) explicit, ALL → (1.70^2 - 1^2)/(1.86^2 - 1.70^2)
Vple1(z) := (1*π + atan(sqrt(z/(1 - z))) + atan(sqrt((z + a1)/(1 - z))))/sqrt(1 - z)
a = 3.31812
Vple2(z) := (2*π + atan(sqrt(z/(1 - z))) + atan(sqrt((z + a1)/(1 - z))))/sqrt(1 - z)
arctg(r) := 1/2*ln((r + 1)/(r - 1))
Vple3(z) := (3*π + atan(sqrt(z/(1 - z))) + atan(sqrt((z + a1)/(1 - z))))/sqrt(1 - z)
Vple(z) := (r*π + atan(sqrt(z/(1 - z))) + atan(sqrt((z + a)/(1 - z))))/sqrt(1 - z)
Vple4(z) := (4*π + atan(sqrt(z/(1 - z))) + atan(sqrt((z + a1)/(1 - z))))/sqrt(1 - z)
x := 0
Given
Vple(x) == Vf
bf := Find(x)
Given
Vple(x) == Vh
bh := Find(x)
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bf = 0.568175
bh = 0.897674
Nh := sqrt(bh*(n_v^2 - n_n^2) + n_n^2) explicit, ALL → sqrt(bh*(1.86^2 - 1.70^2) + 1.70^2) = 1.84427
Nf := sqrt(bf*(n_v^2 - n_n^2) + n_n^2) explicit, ALL → sqrt(bf*(1.86^2 - 1.70^2) + 1.70^2) = 1.79266
# Проверка УВР
n_n = 1.7
Nh = 1.84427
n_v = 1.86
n_n = 1.7
Nf = 1.79266
n_v = 1.86
# Норм. частота
k := 2*π/lab explicit, ALL → 2*π/(1.06*10^-6)
k = 5927533
a1 = 2.50357e-6
Given
Vy := k*a1*sqrt(Nh^2 - Nf^2) explicit, ALL → 2*π/(1.06*10^-6)*3.5*7.15304545625e-7*sqrt(1.84426551761^2 - 1.79266079692^2) = 6.42902
Vple0(x) == Vy
by := Find(x)
# Кол-во мод
Given
Vple1(x) == Vy
Mx := (Vh - atan(sqrt(a1)))/π + 1 explicit, ALL → (2*π/(1.06*10^-6)*2.6*7.15304545625e-7*sqrt(1.86^2 - 1.70^2) - atan(sqrt(3.5*7.15304545625e-7)))/π + 1 = 3.64783
by1 := Find(x)
My := Vy/π + 1 explicit, ALL → 6.42902329414/π + 1 = 3.04642
Given
Vple2(x) == Vy
by2 := Find(x)
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by = 0.862683
by1 = 0.474363
by2 = 0.00434
Ny0 := sqrt(by*(Nh^2 - Nf^2) + Nf^2) explicit, ALL → sqrt(by*(1.84426551761^2 - 1.79266079692^2) + 1.79266079692^2) = 1.83727
Ny1 := sqrt(by1*(Nh^2 - Nf^2) + Nf^2) explicit, ALL → sqrt(by1*(1.84426551761^2 - 1.79266079692^2) + 1.79266079692^2) = 1.81732
Ny2 := sqrt(by2*(Nh^2 - Nf^2) + Nf^2) explicit, ALL → sqrt(by2*(1.84426551761^2 - 1.79266079692^2) + 1.79266079692^2) = 1.79289
beta_y0 := k*Ny0 = 10890450
n_n*k = 10076807
beta_y1 := k*Ny1 = 10772242
n_v*k = 11025212
beta_y2 := k*Ny2 = 10627403
# 3 Цилиндрический
n1 := n_v
n2 := n_n
a := 25*10^-6  # Т.к. по условию 2*а = 50 мкм
# Симметричн волн-д
V := k*a*sqrt(n1^2 - n2^2) explicit, ALL → 2*π/(1.06*10^-6)*25*10^-6*sqrt(1.86^2 - 1.70^2) = 111.84
Mst := V^2/2 explicit, ALL → 111.840474787^2/2 = 6254.15
g := 2
Mgr := V^2/(2*(1 + 2/g)) explicit, ALL → 111.840474787^2/(2*(1 + 2/2)) = 3127.07
# Асимметричн Вол-д
n2 := 1
V := k*a*sqrt(n1^2 - n2^2) explicit, ALL → 2*π/(1.06*10^-6)*25*10^-6*sqrt(1.86^2 - 1^2) = 232.405
Mst := V^2/2 explicit, ALL → 232.405420962^2/2 = 27006.1
Mgr := V^2/(2*(1 + 2/g)) explicit, ALL → 232.405420962^2/(2*(1 + 2/2)) = 13503.1
3.2
V := 2.2
n1 := n_v
n2 := n_n
double_a := V*lab/(π*sqrt(n1^2 - n2^2)) explicit, ALL → 2.2*1.06*10^-6/(π*sqrt(1.86^2 - 1.70^2)) = 9.83544e-7
3.3
V := 2.2
double_a := 6*10^-6
n1 := n_v
n2 := sqrt(n1^2 - V*lab/(2*π*(double_a/2))) explicit, ALL → sqrt(1.86^2 - 2.2*1.06*10^-6/(2*π*6*10^-6/2))
n2 = 1.82644
delta_n := n1 - n2 = 0.0335599
4
n1 := n_v
A := double_a/2
a := A/(ell*0.01 + 1) = 2.72727e-6
n2 = 1.82644
a = 2.72727e-6
A = 3e-6
Va := k*a*sqrt(n1^2 - n2^2) explicit, ALL → 2*π/(1.06*10^-6)*2.72727272727e-6*sqrt(1.86^2 - sqrt(1.86^2 - 2.2*1.06*10^-6/(2*π*6*10^-6/2))^2) = 5.68612
VA := k*A*sqrt(n1^2 - n2^2) explicit, ALL → 2*π/(1.06*10^-6)*6*10^-6/2*sqrt(1.86^2 - sqrt(1.86^2 - 2.2*1.06*10^-6/(2*π*6*10^-6/2))^2) = 6.25474
b(V) := 1 - ((1 + sqrt(2))/(1 + (4 + V^4)^0.25))^2
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b(Va) = 0.869834
b(VA) = 0.889384
N_Va := sqrt((n1^2 - n2^2)*b(Va) + n2^2) explicit, ALL → sqrt((1.86^2 - sqrt(1.86^2 - 2.2*1.06*10^-6/(2*π*6*10^-6/2))^2)*(1 - (sqrt(2)*0.14944209391 + 0.14944209391)^2) + sqrt(1.86^2 - 2.2*1.06*10^-6/(2*π*6*10^-6/2))^2) = 1.85567
N_VA := sqrt((n1^2 - n2^2)*b(VA) + n2^2) explicit, ALL → sqrt((1.86^2 - sqrt(1.86^2 - 2.2*1.06*10^-6/(2*π*6*10^-6/2))^2)*(1 - (sqrt(2)*0.137763466664 + 0.137763466664)^2) + sqrt(1.86^2 - 2.2*1.06*10^-6/(2*π*6*10^-6/2))^2) = 1.85632
# N_x = N_VA
# N_y = N_Va
# проверка УВР
n2 = 1.82644
N_Va = 1.85567
n1 = 1.86
4.1
n2 = 1.82644
N_VA = 1.85632
n1 = 1.86
c_v := 3*10^8
delta_τ := len/c_v*(N_VA - N_Va) explicit, ALL → 12/(3*10^8)*(1.85631757339 - 1.85566600893) = 2.60626e-11
delta_f := 1/delta_τ explicit, ALL → 1/2.60625784338e-11 = 3.83692e10
4.2
delta_τ1 := delta_τ/len explicit, ALL → 2.60625784338e-11/12 = 2.17188e-12
delta_f1 := 1/delta_τ1 explicit, ALL → 1/2.17188153615e-12 = 4.6043e11
4.3
Lp := 2*π/(N_VA - N_Va) explicit, ALL → 2*π/(1.85631757339 - 1.85566600893) = 9643.23
delta_b := k*(N_VA - N_Va) explicit, ALL → 2*π/(1.06*10^-6)*(1.85631757339 - 1.85566600893) = 3862.17
